# OpenSim document version 40000
ScaleTool P01_scaled:
  mass: 32.9
  height: 1540
  age: 11
  GenericModelMaker P01_scaled:
    model_file: ..\FINAL_PERSONALISEDTORSIONS.osim
  ModelScaler:
    apply: true
    scaling_order: measurements manualScale
    marker_file: .\marker_experimental.trc
    time_range: [0 0.005]
    preserve_mass_distribution: [false]
    output_scale_file: .\scale_output.xml
    MeasurementSet:
      Measurement pelvis_z: apply=true
        MarkerPair: markers=(LASI RASI)
        BodyScale pelvis: axes=Z
      Measurement pelvis_y: apply=true
        MarkerPair: markers=(SACR RHJC)
        MarkerPair: markers=(SACR LHJC)
        BodyScale pelvis: axes=Y
      Measurement femur_r_y: apply=true
        MarkerPair: markers=(RHJC RKJC)
        BodyScale femur_r: axes=(X Y Z)
        BodyScale femoral_cond_r: axes=(X Y Z)
        BodyScale sagittal_articulation_frame_r: axes=(X Y Z)
        BodyScale med_cond_r: axes=(X Y Z)
        BodyScale lat_cond_r: axes=(X Y Z)
        BodyScale tibial_plat_r: axes=(X Y Z)
        BodyScale patella_r: axes=(X Y Z)
      Measurement femur_l_y: apply=true
        MarkerPair: markers=(LKJC LHJC)
        BodyScale femur_l: axes=(X Y Z)
        BodyScale femoral_cond_l: axes=(X Y Z)
        BodyScale sagittal_articulation_frame_l: axes=(X Y Z)
        BodyScale med_cond_l: axes=(X Y Z)
        BodyScale lat_cond_l: axes=(X Y Z)
        BodyScale tibial_plat_l: axes=(X Y Z)
        BodyScale patella_l: axes=(X Y Z)
      Measurement tibia_r_y: apply=true
        MarkerPair: markers=(RKJC RAJC)
        BodyScale tibia_r: axes=(X Y Z)
      Measurement tibia_l_y: apply=true
        MarkerPair: markers=(LKJC LAJC)
        BodyScale tibia_l: axes=(X Y Z)
      Measurement talus_r_z: apply=false
        MarkerPair: markers=(RANK RANM)
      Measurement talus_r_y: apply=false
        MarkerPair: markers=(RHEE RANK)
      Measurement talus_l_z: apply=false
        MarkerPair: markers=(LANK LANM)
      Measurement talus_l_y: apply=false
        MarkerPair: markers=(LANK LHEE)
      Measurement calcn_r_y: apply=false
        MarkerPair: markers=(RHEE RANK)
      Measurement calcn_l_y: apply=false
        MarkerPair: markers=(LHEE LANK)
      Measurement calcn_r_x: apply=false
        MarkerPair: markers=(RHEE RTOE)
      Measurement calcn_l_x: apply=false
        MarkerPair: markers=(LHEE LTOE)
      Measurement torso_x: apply=false
        MarkerPair: markers=(STRN C7)
      Measurement torso_y: apply=true
        MarkerPair: markers=(C7 SACR)
        BodyScale torso: axes=(X Y Z)
      Measurement torso_z: apply=false
        MarkerPair: markers=(LASI RASI)
      Measurement pelvis_x: apply=true
        MarkerPair: markers=(SACR LASI)
        MarkerPair: markers=(SACR RASI)
        BodyScale pelvis: axes=X
      Measurement foot_r: apply=true
        MarkerPair: markers=(RHEE RTOE)
        MarkerPair: markers=(RHEE RANK)
        BodyScale talus_r: axes=(X Y Z)
        BodyScale calcn_r: axes=(X Y Z)
        BodyScale toes_r: axes=(X Y Z)
      Measurement foot_l: apply=true
        MarkerPair: markers=(LHEE LTOE)
        MarkerPair: markers=(LHEE LANK)
        BodyScale talus_l: axes=(X Y Z)
        BodyScale calcn_l: axes=(X Y Z)
        BodyScale toes_l: axes=(X Y Z)
    ScaleSet:
      Scale: scales=([0.853013 0.663 0.663]) segment=pelvis apply=false
      Scale: scales=([0.847561 0.847561 0.847561]) segment=femur_r apply=false
      Scale: scales=([0.741991 0.741991 0.741991]) segment=tibia_r apply=false
      Scale: scales=([0.859674 0.859674 0.859674]) segment=femur_l apply=false
      Scale: scales=([0.737481 0.737481 0.737481]) segment=tibia_l apply=false
  MarkerPlacer:
    apply: true
    marker_file: .\marker_experimental.trc
    time_range: [0 0.005]
    output_motion_file: .\static_output.mot
    output_model_file: .\FINAL_PERSONALISEDTORSIONS_scaled.osim
    output_marker_file: .\static_output.trc
    max_marker_movement: -1
    IKTaskSet:
      IKMarkerTask RASI: apply=true weight=30
      IKMarkerTask LASI: apply=true weight=30
      IKMarkerTask SACR: apply=true weight=30
      IKMarkerTask RHJC: apply=false weight=1
      IKMarkerTask RT1: apply=false weight=0.5
      IKMarkerTask RT2: apply=false weight=0.5
      IKMarkerTask RT3: apply=false weight=0.5
      IKMarkerTask RKNM: apply=true weight=20
      IKMarkerTask RS1: apply=false weight=0.5
      IKMarkerTask RS2: apply=false weight=0.5
      IKMarkerTask RS3: apply=false weight=0.5
      IKMarkerTask RANK: apply=true weight=10
      IKMarkerTask RANM: apply=true weight=10
      IKMarkerTask RHEE: apply=true weight=10
      IKMarkerTask RTOE: apply=true weight=10
      IKMarkerTask RKJC: apply=false weight=1
      IKMarkerTask RAJC: apply=false weight=1
      IKMarkerTask RKNE: apply=true weight=20
      IKMarkerTask LTOE: apply=true weight=10
      IKMarkerTask LAJC: apply=false weight=1
      IKMarkerTask LHEE: apply=true weight=10
      IKMarkerTask LANK: apply=true weight=10
      IKMarkerTask LANM: apply=true weight=10
      IKMarkerTask LS2: apply=false weight=0.5
      IKMarkerTask LS3: apply=false weight=0.5
      IKMarkerTask LS1: apply=false weight=0.5
      IKMarkerTask LKNM: apply=true weight=20
      IKMarkerTask LKJC: apply=false weight=1
      IKMarkerTask LKNE: apply=true weight=20
      IKMarkerTask LT1: apply=false weight=0.5
      IKMarkerTask LT2: apply=false weight=0.5
      IKMarkerTask LT3: apply=false weight=0.5
      IKMarkerTask LHJC: apply=false weight=1
      IKMarkerTask CLAV: apply=true weight=1
      IKMarkerTask STRN: apply=true weight=1
      IKMarkerTask T10: apply=true weight=1
      IKMarkerTask RBAK: apply=false weight=1
      IKMarkerTask C7: apply=true weight=1
