# OpenSim document version 40000
AnalyzeTool:
  model_file: C:\Git\research_data\Projects\torsion_deformities_healthy_kinematics\simulations\TD01\pre\FINAL_PERSONALISEDTORSIONS_scaled.osim
  replace_force_set: false
  results_directory: C:\Git\research_data\Projects\torsion_deformities_healthy_kinematics\simulations\TD01\pre\dynamic_14_l
  output_precision: 8
  initial_time: 0.505
  final_time: 1.44
  solve_for_equilibrium_for_auxiliary_states: true
  maximum_number_of_integrator_steps: 20000
  maximum_integrator_step_size: 1
  minimum_integrator_step_size: 1e-8
  integrator_error_tolerance: 1e-5
  external_loads_file: .\GRF.xml
  coordinates_file: C:\Git\research_data\Projects\torsion_deformities_healthy_kinematics\simulations\TD01\pre\dynamic_14_l\ik.mot
  lowpass_cutoff_frequency_for_coordinates: 6
  AnalysisSet Analyses:
    ProbeReporter: start_time=0.505 end_time=1.44 step_interval=1 in_degrees=true
