# OpenSim document version 40000
ForwardTool arm26:
  model_file: C:\Users\Biomech\Documents\OpenSim\4.4\Models\Arm26\OutputReference\ForwardDynamics\arm26.osim
  replace_force_set: false
  results_directory: Bas
  output_precision: 8
  initial_time: 0
  final_time: 1
  solve_for_equilibrium_for_auxiliary_states: true
  maximum_number_of_integrator_steps: 30000
  maximum_integrator_step_size: 1
  minimum_integrator_step_size: 1e-8
  integrator_error_tolerance: 1e-5
  AnalysisSet Analyses:
    BodyKinematics: start_time=0 end_time=1 step_interval=1 in_degrees=true bodies=all
        express_results_in_body_local_frame=false
    MuscleAnalysis: start_time=0 end_time=1 step_interval=1 in_degrees=true muscle_list=all
        moment_arm_coordinate_list=all compute_moments=false
  ControllerSet Controllers:
    ControlSetController: controls_file=C:/Users/Biomech/Documents/OpenSim/4.4/Models/Arm26/OutputReference/ForwardDynamics/../StaticOptimization/NonphysiologicalResults/arm26_StaticOptimization_controls.xml
