# OpenSim document version 40000
AnalyzeTool subject01_walk1:
  model_file: subject01_simbody_adjusted.osim
  replace_force_set: false
  force_set_files: gait2392_CMC_Actuators.xml
  results_directory: C:\Users\Bas\Documents\OpenSim\4.4\Models\Gait2392_Simbody\.\ResultsAnalyze
  output_precision: 8
  initial_time: 0.8
  final_time: 1.18
  solve_for_equilibrium_for_auxiliary_states: false
  maximum_number_of_integrator_steps: 20000
  maximum_integrator_step_size: 1
  minimum_integrator_step_size: 1e-8
  integrator_error_tolerance: 1e-5
  external_loads_file: subject01_walk1_grf.xml
  states_file: C:\Users\Bas\Documents\OpenSim\4.4\Models\Gait2392_Simbody\ResultsCMC\subject01_walk1_states.sto
  lowpass_cutoff_frequency_for_coordinates: -1
  AnalysisSet Analyses:
    Kinematics: coordinates=all start_time=0.8 end_time=1.18 step_interval=10 in_degrees=true
    Actuation: start_time=0.8 end_time=1.18 step_interval=10 in_degrees=true
    BodyKinematics: start_time=0.8 end_time=1.18 step_interval=10 in_degrees=true bodies=all
        express_results_in_body_local_frame=false
    MuscleAnalysis: start_time=0.8 end_time=1.18 step_interval=1 in_degrees=true muscle_list=all
        moment_arm_coordinate_list=knee_angle_r compute_moments=false
    JointReaction: start_time=0.8 end_time=1.18 step_interval=1 in_degrees=true joint_names=ALL apply_on_bodies=child
        express_in_frame=ground
  ControllerSet Controllers:
    ControlSetController: controls_file=C:\Users\Bas\Documents\OpenSim\4.4\Models\Gait2392_Simbody\ResultsCMC\subject01_walk1_controls.xml
