# OpenSim document version 40000
AnalyzeTool subject01_walk1:
  model_file: gait2392_simbody.osim
  replace_force_set: false
  force_set_files: gait2392_SO_Actuators.xml
  results_directory: .\ResultsAnalyze
  output_precision: 8
  initial_time: 0.5
  final_time: 2.5
  solve_for_equilibrium_for_auxiliary_states: false
  maximum_number_of_integrator_steps: 20000
  maximum_integrator_step_size: 1
  minimum_integrator_step_size: 1e-8
  integrator_error_tolerance: 1e-5
  external_loads_file: subject01_walk1_grf.xml
  coordinates_file: subject01_walk1_ik.mot
  lowpass_cutoff_frequency_for_coordinates: -1
  AnalysisSet Analyses:
    JointReaction: start_time=0.5 end_time=2.5 step_interval=1 in_degrees=true
        forces_file=.\SO\s_StaticOptimization_force.sto joint_names=all apply_on_bodies=child express_in_frame=child
