# OpenSim document version 40000
InverseKinematicsTool Run_baseline1:
  results_directory: .\
  model_file: ..\..\009_Rajagopal2015_FAI.osim
  constraint_weight: Inf
  accuracy: 1e-6
  output_motion_file: C:\Git\BIP_OpenSim_Hungarian_USports\ExampleData\Sprinting\009\session1\Run_baseline\ik.mot
  report_errors: true
  marker_file: markers.trc
  report_marker_locations: false
  IKTaskSet:
    IKMarkerTask FHD: apply=false weight=1
    IKMarkerTask LBHD: apply=true weight=1
    IKMarkerTask RBHD: apply=true weight=1
    IKMarkerTask C7: apply=true weight=1
    IKMarkerTask T10: apply=true weight=10
    IKMarkerTask CLAV: apply=true weight=10
    IKMarkerTask LSHO: apply=true weight=10
    IKMarkerTask LUUPA: apply=true weight=10
    IKMarkerTask LMUPA: apply=true weight=10
    IKMarkerTask LDUPA: apply=true weight=10
    IKMarkerTask LRAD: apply=false weight=1
    IKMarkerTask LRFIN: apply=true weight=10
    IKMarkerTask RSHO: apply=true weight=10
    IKMarkerTask RUPA1: apply=true weight=10
    IKMarkerTask RMUPA: apply=true weight=10
    IKMarkerTask RDUPA: apply=true weight=10
    IKMarkerTask RRAD: apply=false weight=1
    IKMarkerTask RUFIN: apply=true weight=10
    IKMarkerTask LASI: apply=false weight=500
    IKMarkerTask RASI: apply=true weight=500
    IKMarkerTask USACR: apply=true weight=1000
    IKMarkerTask LSACR: apply=true weight=1000
    IKMarkerTask RSACR: apply=true weight=1000
    IKMarkerTask LHJC: apply=false weight=1
    IKMarkerTask LTHI1: apply=true weight=300
    IKMarkerTask LTHI2: apply=true weight=300
    IKMarkerTask LTHI3: apply=true weight=300
    IKMarkerTask LTHI4: apply=true weight=300
    IKMarkerTask LLFC: apply=false weight=1
    IKMarkerTask LMFC: apply=false weight=1
    IKMarkerTask LKJC: apply=false weight=1
    IKMarkerTask LTIB1: apply=true weight=300
    IKMarkerTask LTIB2: apply=true weight=300
    IKMarkerTask LTIB3: apply=true weight=300
    IKMarkerTask LTIB4: apply=true weight=300
    IKMarkerTask LLMAL: apply=false weight=1
    IKMarkerTask LMMAL: apply=false weight=1
    IKMarkerTask LAJC: apply=false weight=1
    IKMarkerTask LHEE: apply=true weight=50
    IKMarkerTask LMT1: apply=true weight=50
    IKMarkerTask LMT2: apply=true weight=5
    IKMarkerTask LMT5: apply=false weight=5
    IKMarkerTask RHJC: apply=false weight=1
    IKMarkerTask RTHI: apply=true weight=300
    IKMarkerTask RTHI2: apply=true weight=300
    IKMarkerTask RTHI3: apply=true weight=300
    IKMarkerTask RTHI4: apply=true weight=300
    IKMarkerTask RMFC: apply=false weight=10
    IKMarkerTask RKJC: apply=false weight=1
    IKMarkerTask RTIB1: apply=true weight=300
    IKMarkerTask RTIB2: apply=true weight=300
    IKMarkerTask RTIB3: apply=true weight=300
    IKMarkerTask RTIB4: apply=true weight=300
    IKMarkerTask RLMAL: apply=false weight=1
    IKMarkerTask RMMAL: apply=false weight=1
    IKMarkerTask RAJC: apply=false weight=1
    IKMarkerTask RHEE: apply=true weight=50
    IKMarkerTask RMT1: apply=true weight=50
    IKMarkerTask RMT2: apply=true weight=5
    IKMarkerTask RMT5: apply=true weight=5
    IKCoordinateTask [values shared by the 11 below unless stated]: apply=false weight=0.1 value_type=default_value
        value=0
    IKCoordinateTask hip_flexion_r
    IKCoordinateTask hip_adduction_r
    IKCoordinateTask hip_rotation_r
    IKCoordinateTask knee_angle_r
    IKCoordinateTask ankle_angle_r
    IKCoordinateTask hip_flexion_l
    IKCoordinateTask hip_adduction_l
    IKCoordinateTask hip_rotation_l
    IKCoordinateTask knee_angle_l
    IKCoordinateTask ankle_angle_l
    IKCoordinateTask mtp_angle_l: weight=1
